*Heading
M Peirlinck WCCM2024 workshop - myocardial twist pull block
*****************************************************************************
** When using, please cite:
**
** "A universal material subroutine for soft matter systems"
** M. Peirlinck, J.A. Hurtado, M.K. Rausch, A. Buganza Tepole, E. Kuhl
** Engineering with Computers, 2024
**
*****************************************************************************
*Preprint, echo=NO, model=NO, history=NO, contact=NO
*INCLUDE, input=UNIVERSAL_PARAM_TYPES.inc
** ----------------------------------------------------------------
**
** PART INSTANCE: Part-1-1
**
*Node
      1,          -5.,          -5.,          10.
      2,          -5.,          -4.,          10.
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*Element, type=C3D8H
   1,  122,  123,  134,  133,    1,    2,   13,   12
   2,  123,  124,  135,  134,    2,    3,   14,   13
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*Nset, nset=Part-1-1__PickedSet4, generate
    1,  1331,     1
*Elset, elset=Part-1-1__PickedSet4, generate
    1,  1000,     1
*Nset, nset=Part-1-1__PickedSet5, generate
    1,  1331,     1
*Elset, elset=Part-1-1__PickedSet5, generate
    1,  1000,     1
*Nset, nset=Part-1-1_ALL, generate
    1,  1331,     1
*Elset, elset=Part-1-1_ALL, generate
    1,  1000,     1
*Orientation, name=Part-1-1-Ori-1, LOCAL DIRECTIONS=3
1., 0., 0., 0., 1., 0.
2, 90.
** Section: Section-1
*Solid Section, elset=Part-1-1__PickedSet4, orientation=Part-1-1-Ori-1, material=UNIVERSALMAT
,
*System
*Node
   1332,           5.,           0.,           5.
*Nset, nset=_PickedSet4, generate
   1,  121,    1
*Elset, elset=_PickedSet4, generate
   1,  100,    1
*Nset, nset=_PickedSet8, generate
 1211,  1331,     1
*Elset, elset=_PickedSet8, generate
  901,  1000,     1
*Nset, nset=_PickedSet9
1332,
*Nset, nset=_PickedSet10
1332,
*Surface, type=NODE, name=_PickedSet8_CNS_
_PickedSet8, 1.
** Constraint: Constraint-KINCOUP
*Coupling, constraint name=Constraint-KINCOUP, ref node=_PickedSet9, surface=_PickedSet8_CNS_
*Kinematic
**
** MATERIALS
**
*Material, name=UNIVERSALMAT
** *MATERIAL, name=MATMYOCARD
*ANISOTROPIC HYPERELASTIC, definition=USER, formulation=INVARIANT, type=INCOMPRESSIBLE, local direction=3
*PARAMETER TABLE, type="UNIVERSAL_TAB"
2,1,2,1,1.0,2.2725620E+00,2.2725594E-03
4,2,2,2,1.0,2.1151228E+01,8.1170170E-05
14,2,2,2,1.0,4.3718562E+00,3.1552851E-04
6,1,2,2,1.0,5.0801408E-01,4.8645619E-04
**
** BOUNDARY CONDITIONS
**
** Name: BC-ENCASTRE Type: Symmetry/Antisymmetry/Encastre
*Boundary
_PickedSet4, ENCASTRE
** ----------------------------------------------------------------
**
** STEP: Step-1
**
*Step, name=Step-1, nlgeom=YES, inc=1000
*Static, STABILIZE
0.00005, 1., 1e-05, 0.1
**
** BOUNDARY CONDITIONS
**
** Name: BC-PULL Type: Displacement/Rotation
*Boundary
_PickedSet10, 1, 1, 2.5
_PickedSet10, 4, 4, 1.5708
**
** OUTPUT REQUESTS
**
*Restart, write, frequency=0
**
** FIELD OUTPUT: F-Output-1
**
*Output, field, number interval=10
*Node Output
U,
*Element Output, directions=YES
LE, S
**
** HISTORY OUTPUT: H-Output-1
**
*Output, history, variable=PRESELECT
*End Step
